#-------------------------------------------------
#  N+3 Config D8-1
#
#  Dimensional unit and parameter data.
#  Mass & Inertia breakdown.
#-------------------------------------------------

#  Names and scalings for units to be used for trim and eigenmode calculations.
#  The Lunit and Munit values scale the mass, xyz, and inertia table data below.
#  Lunit value will also scale all lengths and areas in the AVL input file.
Lunit = 0.3048 m
Munit = 0.4535 kg
Tunit = 1.0    s

#-------------------------
#  Gravity and density to be used as default values in trim setup.
#  Must be in the units given above.
g   = 9.81
rho = 0.38

#-------------------------
#  Mass & Inertia breakdown.
#  x y z  is location of item's own CG.
#  Ixx... are item's inertias about item's own CG.
#
#  x,y,z system here must be exactly the same one used in the AVL input file
#     (same orientation, same origin location, same length units)
#
#  mass     x     y     z       Ixx    Iyy    Izz   [ Ixy  Ixz  Iyz ]
#
* 1.25    1.25   1.25   1.25    1.25    1.25     1.25
  3000.0   8.0    0.    5.0      0       0      0         ! cockpit
 19420.0  58.0    0.   -1.0   8.00e6   0.10e6   8.10e6    ! wing
 33720.0  55.0    0.    2.0   0.72e6  18.90e6  19.60e6    ! fuselage
   310.0 115.0    0.    0.0   0.       0.       0.        ! tailcone
   528.0 113.0    0.    2.0   0.05e6   0.01e6   0.06e6    ! HT
   616.0 100.0    0.    8.0   0.11e6   0.02e6   0.11e6    ! VT
 11386.0  50.0    0.    5.0   0.       0.       0.        ! Engines
  4500.0  66.0    0.   -4.0   0.50e6   0.0      0.50e6    ! Main gear
  1250.0  26.0    0.   -5.0   0.       0.       0.        ! Nose gear
*  1.      1.     1.    1.     1.      1.       1.
 38000.0  58.0    0.   -1.0   3.00e6   0.08e6   3.08e6    ! fuel
* 1.      1.     1.    1.     1.      1.       1.
+  0.     14.0    0.    0.     0.      0.       0.
 38700.0  52.0    0.    2.0   0.80e6  11.50e6  12.30e6    ! PAX
