Tapered wing with root gap
!Mach
 0.0
!IYsym   IZsym   Zsym
 1       0       0.
!Sref    Cref    Bref
0.314    0.079    2.0
!Xref    Yref    Zref
-0.05    0.0      0.0


SURFACE
WING
!Nchordwise  Space
12           1.0      90   -2.0

SCALE
1.0    0.9999   1.0

TRANSLATE
0.0    0.0001   0.0

SECTION
!Xle    Yle    Zle     Chord   Ainc  Nspanwise  Space
-0.1000   0.000  0.000   0.2000   0.
NACA
4500

SECTION
!Xle    Yle    Zle     Chord   Ainc  Nspanwise  Space
-0.0900   0.50   0.000   0.1800   0.
NACA
4500

SECTION
!Xle    Yle    Zle     Chord   Ainc  Nspanwise  Space
-0.0550   0.85   0.000   0.1100   0.
NACA
4500

SECTION
!Xle    Yle    Zle     Chord   Ainc  Nspanwise  Space
-0.0250   1.00   0.000   0.05     0.
NACA
4500
