!************************************
!Sample "HERSEY BAR" wing AVL dataset
!Section drag polars specified
!************************************
SWEPT HERSEY BAR WING WITH CDVISC
!Mach
 0.0
!IYsym   IZsym   Zsym
 1       0       0.0
!Sref    Cref    Bref
3.894    0.708   5.5
!Xref    Yref    Zref
0.177    0.0     0.0
!
SURFACE
WING
!Nchordwise  Space
 8           1.0
!
SECTION
!Xle    Yle    Zle     Chord   Ainc  Nspanwise  Space
0.000   0.000  0.000   0.708    0.    10         1.0
CDCL
-0.5  1.200  0.3  1.00  1.5  1.200
SECTION
!Xle    Yle    Zle     Chord   Ainc  Nspanwise  Space
1.000   2.75   0.000   0.708    0.     0         0.0
CDCL
-0.5  1.200  0.3  1.00  1.5  1.200
